260^2 + 260^2 == c^2 solve, c → [260*sqrt(2); -260*sqrt(2)] = [367.696; -367.696]
605/1400 = 0.432143
g := 370  # romb diagonal
p := 570/1400
vw := 1300  # screen width
g^2 == 2*k^2 solve, k → [185*sqrt(2); -185*sqrt(2)] = [261.63; -261.63]
p^2 == 2*x^2 solve, x → [57*sqrt(2)/280; -57*sqrt(2)/280] = [0.287893; -0.287893]
g/260 = 1.42308
1.423*370/1300 = 0.405008
1300/8.7 = 149.425
1300*0.4 = 520
0.264*100 = 26.4
2*450^2 = 405000
sqrt(4.05*10^5) = 636.396
260*0.264 = 68.64
